# NUFEB simulation
units si
atom_style      bio
atom_modify     map array sort 100 5.0e-7
boundary        pp pp ff
newton          off
processors  2 2 1

comm_modify     vel yes
read_data_bio atom.in

group AOB type 1
group NOB type 2
group DEAD type 3

##############Define initial particle distribution##############

lattice sc 2e-5 origin 0.5 0.5 0.4
region reg block 0 6 0 3 0 1
create_atoms 1 region reg

lattice sc 2e-5 origin 0.1 0.5 0.4
region reg2 block 0 6 0 3 0 1
create_atoms 2 region reg2

set type 1 diameter 2.3e-6
set type 1 density 200
set type 1 mass 1.64e-15
set type 2 diameter 2.3e-6
set type 2 density 200
set type 2 mass 1.64e-15

lattice sc 1e-5 origin 0 0 0
region reg3 block 0 12 0 6 25 30

neighbor        5e-7 bin
neigh_modify    delay 0 one 5000

##############Define DEM Variables&Commands##############

pair_style  gran/hooke/history 1.e-4 NULL 1.e-5 NULL 0.0 1
pair_coeff  * *

timestep 3600

fix 1 all nve/limit 1e-7
fix fv all viscous 1e-5

fix zw all wall/gran hooke/history 2000 NULL 500 NULL 1.5 0 zplane  0.0  3e-04

variable kanc equal 0
fix zwa all walladh v_kanc zplane  0.0   3e-04

variable ke equal 5e+9
#fix j1 all epsadh 1 v_ke 1

##############Ibm Variable Definitions##############

#Defining EPS density and ratio variables
variable EPSdens equal 30
variable EPSratio equal 1.25

#variables used in fix division
variable divDia equal 2.5e-6

#Defining diffusion variables
variable diffT equal 1e-4
variable tol equal 1e-6
variable etaHET equal 0.0
variable layer equal 2e-5

#variables used in fix death
variable deadDia equal 6.8e-7

##############Ibm functions##############

fix k1 all kinetics 1 40 20 100 v_diffT v_layer demflag 0 niter 100 ph 7.5
#fix ki3 all kinetics/ph
fix ki2 all kinetics/thermo
fix ki1 all kinetics/growth/energy v_EPSdens
fix g1 all kinetics/diffusion v_tol pp pp nd mol
fix d1 all divide 1 v_EPSdens v_divDia 31231 demflag 0
fix d2 all death 1 v_deadDia demflag 0

##############Ibm compute##############

compute myNtypes all ntypes
compute myMass all biomass
compute myAvgs all avg_con
compute myPh all avg_ph

##############Simulation outputs##############

thermo_style    custom step cpu atoms biomass c_myNtypes[*] c_myAvgs[3]
dump du0 all bio 21 biomass ntypes bulk avg_con avg_ph
#dump du1 all custom 20001 snapshot.bubblemd id type diameter x y z
#dump du2 all grid 20001 grid_%_*.vti con cat ana hyd
#dump du3 all custom/vtk 20001 snapshot%_*.vtu id type diameter x y z
#dump du4 all bio/hdf5 20001 dump_*.h5 id type radius x y z con cat ana hyd
thermo 5001
thermo_modify   lost ignore

##############Define Bio-loop and DEM-subloop##############

run 2400 pre no post no every 1 &
"fix_modify k1 demflag 1" &
"fix_modify d2 demflag 1" &
"fix_modify d1 demflag 1" &
"delete_atoms region reg3" &
"timestep 1e-3" &
"run 5000 pre no post no" &
"timestep 3600" &
"fix_modify k1 demflag 0" &
"fix_modify d2 demflag 0" &
"fix_modify d1 demflag 0" &
