# NUFEB simulation

atom_style	bio
atom_modify	map array sort 1000 5.0e-7
boundary	ff ff ff
newton		off
#processors  2 1 1

#radius x y z outerradius sub o2 nh4 no2 no3
comm_modify	vel yes
read_data_bio atom.in

group HET type 1 2
group EPS type 3

neighbor	5.0e-7 bin
neigh_modify	delay 0 one 5000

#pair_style none
pair_style  gran/hooke/history 200 NULL 50 NULL 0.0 1

pair_coeff  * *
timestep 10

#velocity all set 0.0 0.0 0.0 units box

fix 1 all nve/limit 1e-8

#fix	 2 all gravity 1.47 vector 0 0 -1 # spherical 90.0 -180.0
#fix     3 all fdrag
fix 10 all viscous 0.1


#fix xw all wall/gran 200 NULL 50.0 NULL 1.5 0 xplane  0.000000e-04 1.000000e-04
#fix yw all wall/gran 200 NULL 50.0 NULL 1.5 0 yplane  0.000000e-04 1.000000e-04
#fix zw all wall/gran 200 NULL 50.0 NULL 1.5 0 zplane  0.000000e-04 1.000000e-04

variable kanc equal 50

fix xwa all walladh v_kanc xplane  0.000000e-04 1.000000e-04
fix ywa all walladh v_kanc yplane  0.000000e-04 1.000000e-04
fix zwa all walladh v_kanc zplane  0.000000e-04 1.000000e-04

##############Ibm Variable Definitions##############

#Defining EPS density and ratio variables
variable EPSdens equal 30
variable EPSratio equal 1.25

#Defining critical diameter of death
variable deadDia equal 0.8e-6

variable factor equal 1.5

variable ke equal 5e+10

#Defining shear force parameters
variable viscosity equal 0.5
variable shearRate equal 0.6
variable height equal 5e-5

#Defining metobolism variables
variable temp equal 298.15
variable gasTran equal 0.08205746
variable gvol equal 2e-11
variable rth equal 0.0083144

#Defining diffusion variables
variable diffT equal 1e-3
variable tol equal 1e-6

##############Ibm functions##############

fix k1 all kinetics 5 5 5 v_temp
fix g1 all diffusion 1 imp v_diffT v_tol dd dd dd
fix ki1 all kinetics/monod 1 v_gasTran v_gvol v_EPSdens
#fix ki2 all kinetics/thermo 1 v_rth

#fix dt1 HET inert 1 v_bHET v_factor 4123
#fix dt2 AOB inert 1 v_bAOB v_factor 412321
#fix dt3 NOB inert 1 v_bNOB v_factor 41231

fix j1 all epsadh 1 v_ke 1
#fix d1 all divide 1 v_EPSdens 1.0 3123
#fix e1 HET eps_extract 1 v_EPSratio v_EPSdens 1242242
#fix d5 all death 500 v_deadDia

#fix s1 all shear 10 v_viscosity v_shearRate v_height zx 0 80000

##############Simulation outputs##############

dump		id all custom 1000 snapshot.bubblemd id type diameter x y z vx vy vz fx fy fz
thermo_style    custom step cpu atoms
thermo		1
thermo_modify	lost ignore

run  100
