# NUFEB simulation

atom_style	bio
atom_modify	map array sort 10000 5e-7
boundary	ff ff ff
newton		off
#processors  2 1 1

communicate single vel yes
read_data 	flat_surface.in
#read_data 	IC5nut.in
#read_data 	IC4mmcohe.in


group HET type 1
group AOB type 2
group NOB type 3
group EPS type 4
group inert type 5


neighbor	5.0e-7 bin
neigh_modify	delay 0
neigh_modify one 1000

#pair_style  none
pair_style  gran/hooke/history 200 NULL 50 NULL 0.0 1
pair_coeff  * *
timestep	1

velocity    all set 0.0 0.0 0.0 units box

fix		1 AOB nve/limit 1e-10
fix		1n NOB nve/limit 1e-10
fix		1e EPS nve/limit 1e-10
fix		1i inert nve/limit 1e-10
fix		1e HET nve/limit 1e-9

#fix		1a EPS nve/limit 1e-11
#fix		2 all gravity 1.47 vector 0 0 -1 # spherical 90.0 -180.0
#fix		2a EPS gravity 1.47 vector 0 0 -1 # spherical 90.0 -180.0
#fix     3 all fdrag


fix xw all wall/gran 200 NULL 50.0 NULL 1.5 0 xplane  0.0 0.00004
fix yw all wall/gran 200 NULL 50.0 NULL 1.5 0 yplane  0.0 0.00004
fix zw all wall/gran 200 NULL 50.0 NULL 1.5 0 zplane  0.0 0.00004
#fix xw1 EPS wall/gran 200 NULL 50.0 NULL 1.5 0 xplane  0.0 0.00004
#fix yw1 EPS wall/gran 200 NULL 50.0 NULL 1.5 0 yplane  0.0 0.00004
#fix zw1 EPS wall/gran 200 NULL 50.0 NULL 1.5 0 zplane  0.0 0.00004

variable kanc equal 50

fix xwa all walladh v_kanc xplane  0.0 0.00004
fix ywa all walladh v_kanc yplane  0.0 0.00004
fix zwa all walladh v_kanc zplane  0.0 0.00004
#fix xwa1 EPS walladh v_kanc xplane  0.0 0.00004
#fix ywa1 EPS walladh v_kanc yplane  0.0 0.00004
#fix zwa1 EPS walladh v_kanc zplane  0.0 0.00004


#Defining affinity variables: list from Jaya
variable KsHET equal 0.01
variable Ko2HET equal 0.81
variable Kno2HET equal 0.0003
variable Kno3HET equal 0.0003

variable Knh4AOB equal 0.001
variable Ko2AOB equal 0.0005

variable Kno2NOB equal 0.0013
variable Ko2NOB equal 0.00068


#Defining maximum growth variables: list from Jaya
variable MumHET equal 0.00006944444
variable MumAOB equal 0.00003472222
variable MumNOB equal 0.00003472222
variable etaHET equal 0.6

#Defining decay rates variables: list from Jaya
variable bHET equal 0.00000462962
#variable bHET equal 0.00462962
variable bAOB equal 0.00000127314
#variable bAOB equal 0.00127314
variable bNOB equal 0.00000127314
#variable bNOB equal 0.00127314
variable bEPS equal 0.00000196759

variable YEPS equal 0.18
variable YHET equal 0.61
variable EPSdens equal 100
variable EPSratio equal 1.25

variable factor equal 2.0

variable ke equal 5e+10

#variable rate1 equal 0.001
fix g1 all nugrowth 1 v_KsHET v_Ko2HET v_Kno2HET v_Kno3HET v_Knh4AOB v_Ko2AOB v_Kno2NOB v_Ko2NOB v_MumHET v_MumAOB v_MumNOB v_etaHET v_bEPS v_YEPS v_YHET v_EPSdens
fix dt1 HET death 100 v_bHET v_factor 1952467
fix dt2 AOB death 100 v_bAOB v_factor 1234312
fix dt3 NOB death 100 v_bNOB v_factor 1325352
fix d1 all divide 1000 v_EPSdens 2.0 1242242
fix e1 HET eps_extract 1000 v_EPSratio v_EPSdens 1242242
fix j1 all epsadh 1 v_ke


#dump		id1 HET custom 2000 HET.bubblemd radius outerradius
#dump		id2 all custom 1000 EPS.bubblemd id type radius outerradius mass outermass
#dump		id2 EPS custom 1000 snapshot2.bubblemd id type diameter mass x y z vx vy vz
dump		id all custom 2000 snapshot.bubblemd id type diameter x y z vx vy vz fx fy fz


#dump d0 all image 100 dump.*.jpg type type
#dump m0 all movie 1000 movie.mpg type type size 640 480

thermo_style    custom step atoms ke vol

#thermo_style  granular # not work. syntax change?
#thermo_style  one   # granular does not work
thermo		1000
thermo_modify	lost error
#restart		1000000  restart.*.bubblemd

run 232800
